// SBML level 2 version 1

model Negativefeedback_Model1()

  // Compartments:
  compartment rootCompartment = 1;

  // Species:
  substanceOnly species InsR in rootCompartment = 3.59393;
  substanceOnly species pInsR in rootCompartment = 0;
  substanceOnly species IRS in rootCompartment = 3.59393;
  substanceOnly species pIRS in rootCompartment = 0;
  substanceOnly species PIP2 in rootCompartment = 1450.8;
  substanceOnly species PIP3 in rootCompartment = 0;
  substanceOnly species PDK1 in rootCompartment = 2.77;
  substanceOnly species pmPDK1 in rootCompartment = 0;
  substanceOnly species Akt in rootCompartment = 607.26;
  substanceOnly species pmAkt in rootCompartment = 0;
  substanceOnly species pmAkt309 in rootCompartment = 0;
  substanceOnly species pmAkt474 in rootCompartment = 0;
  substanceOnly species pmAkt309474 in rootCompartment = 0;
  substanceOnly species PRAS40 in rootCompartment = 3.03;
  substanceOnly species p_PRAS40 in rootCompartment = 0;
  substanceOnly species mTorc1 in rootCompartment = 9.5;
  substanceOnly species p_mTorc1 in rootCompartment = 0;
  substanceOnly species mTorc2 in rootCompartment = 0.33;
  substanceOnly species p_mTorc2 in rootCompartment = 0;
  substanceOnly species pmTorc2 in rootCompartment = 0;

  // Parameters:
  kf1 = 8072.35;
  Km1 = 35.5631;
  kr1 = 5874.89;
  kf2 = 0.500035;
  Km2 = 3.31131;
  ki2 = 0.663743;
  kr2 = 0.0341979;
  kf3 = 2.43781;
  Km3 = 0.0712853;
  kr3 = 0.141254;
  kf4 = 7.07946;
  kr4 = 304.089;
  kf5 = 1;
  kr5 = 662.216;
  kf6 = 0.00512861;
  Km6 = 0.202302;
  kr6 = 0.204644;
  kf7 = 5.00035;
  Km7 = 11.0917;
  kr7 = 0.0246037;
  Km8 = 51.5229;
  Km9 = 0.0781628;
  kf10 = 0.196336;
  kr10 = 1030.39;
  kf11a = 3962.78;
  kf11b = 3962.78;
  Km11 = 0.870964;
  kr11 = 248.313;
  kf12 = 2.74789;
  ki12 = 1901.08;
  kr12 = 0.0188365;
  kf13a = 2027.68;
  kf13b = 36.0579;
  kr13 = 0.0015417;
  Km13 = 2382.32;
  // basal Ins
  InsB0 = 0.01;
  Ins0 = 1;
  Timeinput1 = 60000;
  Tinfinput1 = 601;

  // Assignment rules:
  Ins := Ins0*piecewise(1, (time >= Timeinput1) && (time < Timeinput1 + Tinfinput1), 0);
  phosphoAkt309r := ;
  phosphoAkt474r := ;
  phosphopras40r := ;
  phosphopmAktr := ;
  amTorc2 := pmTorc2 + p_mTorc2;

  // Reactions:
  R1: InsR => pInsR; kf1*InsR*(Ins + InsB0)/(Km1 + InsR) - kr1*pInsR;
  R2: IRS => pIRS; kf2*IRS*pInsR/((Km2 + IRS)*(1 + ki2*p_mTorc1)) - kr2*pIRS;  // modifiers: pInsR, p_mTorc1
  R3: PIP2 => PIP3; kf3*PIP2*pIRS/(Km3 + PIP2) - kr3*PIP3;  // modifiers: pIRS
  R4: PIP3 + PDK1 => pmPDK1; kf4*PDK1*PIP3 - kr4*pmPDK1;
  R5: PIP3 + Akt => pmAkt; kf5*Akt*PIP3 - kr5*pmAkt;
  R6: pmAkt => pmAkt309; kf6*pmAkt*pmPDK1/(Km6 + pmAkt) - kr6*pmAkt309;  // modifiers: pmPDK1
  R7: pmAkt => pmAkt474; kf7*pmAkt*amTorc2/(Km7 + pmAkt) - kr7*pmAkt474;  // modifiers: p_mTorc2, pmTorc2
  R8: pmAkt309 => pmAkt309474; kf7*pmAkt309*amTorc2/(Km8 + pmAkt309) - kr7*pmAkt309474;  // modifiers: p_mTorc2, pmTorc2
  R9: pmAkt474 => pmAkt309474; kf6*pmAkt474*pmPDK1/(Km9 + pmAkt474) - kr6*pmAkt309474;  // modifiers: pmPDK1
  R10: PIP3 + mTorc2 => pmTorc2; kf10*mTorc2*PIP3 - kr10*pmTorc2;
  R11: mTorc2 => p_mTorc2; mTorc2*(kf11a*pmAkt309 + kf11b*pmAkt309474)/(Km11 + mTorc2) - kr11*p_mTorc2;  // modifiers: pmAkt309, pmAkt309474
  R12: mTorc1 => p_mTorc1; kf12*mTorc1/(1 + ki12*PRAS40) - kr12*p_mTorc1;  // modifiers: PRAS40
  R13: PRAS40 => p_PRAS40; PRAS40*(kf13a*pmAkt309 + kf13b*pmAkt309474)/(Km13 + PRAS40) - kr13*p_PRAS40;  // modifiers: pmAkt309, pmAkt309474
end
